<Lems xmlns="http://www.neuroml.org/lems/0.9.0">

    <Target component="sim1" />

    <Dimension name="voltage" m="1" l="2" t="-3" i="-1" />
    <Dimension name="time" t="1" />
    <Dimension name="per_time" t="-1" />
    <Dimension name="conductance" m="-1" l="-2" t="3" i="2" />
    <Dimension name="capacitance" m="-1" l="-2" t="4" i="2" />
    <Dimension name="current" i="1" />

    <ComponentType name="iaf1">
        <Parameter name="threshold" dimension="voltage" />
        <Parameter name="refractoryPeriod" dimension="time" />
        <Parameter name="capacitance" dimension="capacitance" />
    </ComponentType>

    <Unit symbol="mV" dimension="voltage" power="-3" />
    <Unit symbol="ms" dimension="time" power="-3" />
    <Unit symbol="pS" dimension="conductance" power="-12" />
    <Unit symbol="nS" dimension="conductance" power="-9" />
    <Unit symbol="uF" dimension="capacitance" power="-6" />
    <Unit symbol="nF" dimension="capacitance" power="-9" />
    <Unit symbol="pF" dimension="capacitance" power="-12" />
    <Unit symbol="per_ms" dimension="per_time" power="3" />
    <Unit symbol="pA" dimension="current" power="-12" />

    <iaf1 id="celltype_a" threshold="-30 mV" refractoryPeriod="2 ms" capacitance="3uF" />
    <!-- or -->
    <Component id="ctb" type="iaf1" threshold="-30 mV" refractoryPeriod="2 ms" capacitance="1uF" />

    <ComponentType name="iaf2" extends="iaf1">
        <Fixed parameter="threshold" value="-45mV" />
    </ComponentType>

    <ComponentType name="iaf3" extends="iaf1">
        <Parameter name="leakConductance" dimension="conductance" />
        <Parameter name="leakReversal" dimension="voltage" />
        <Parameter name="deltaV" dimension="voltage" />

        <EventPort name="spikes-in" direction="in" />
        <Exposure name="v" dimension="voltage" />

        <Dynamics>
            <StateVariable name="v" exposure="v" dimension="voltage" />
            <TimeDerivative variable="v" value="leakConductance * (leakReversal - v) / capacitance" />

            <OnEvent port="spikes-in">
                <StateAssignment variable="v" value="v + deltaV" />
            </OnEvent>
        </Dynamics>

    </ComponentType>

    <ComponentType name="spikeGenerator">
        <Parameter name="period" dimension="time" />
        <EventPort name="a" direction="out" />
        <Exposure name="tsince" dimension="time" />
        <Dynamics>
            <StateVariable name="tsince" exposure="tsince" dimension="time" />
            <TimeDerivative variable="tsince" value="1" />
            <OnCondition test="tsince .gt. period">
                <StateAssignment variable="tsince" value="0" />
                <EventOut port="a" />
            </OnCondition>
        </Dynamics>
    </ComponentType>

    <ComponentType name="spikeGenerator2" extends="spikeGenerator">
        <Dynamics>
            <StateVariable name="tlast" dimension="time" />
            <DerivedVariable name="tsince" dimension="time" exposure="tsince" value="t - tlast" />
            <OnCondition test="t - tlast .gt. period">
                <StateAssignment variable="tlast" value="t" />
                <EventOut port="a" />
            </OnCondition>
        </Dynamics>
    </ComponentType>

    <ComponentType name="HHRate">
        <Parameter name="rate" dimension="per_time" />
        <Parameter name="midpoint" dimension="voltage" />
        <Parameter name="scale" dimension="voltage" />
        <Requirement name="v" dimension="voltage" />
        <Exposure name="r" dimension="per_time" />
    </ComponentType>

    <ComponentType name="HHExpRate" extends="HHRate">
        <Dynamics>
            <DerivedVariable name="r" dimension="per_time" exposure="r" value="rate * exp((v - midpoint)/scale)" />
        </Dynamics>
    </ComponentType>

    <ComponentType name="HHSigmoidRate" extends="HHRate">
        <Dynamics>
            <DerivedVariable name="r" dimension="per_time" exposure="r" value="rate / (1 + exp( -(v - midpoint)/scale))" />
        </Dynamics>
    </ComponentType>

    <ComponentType name="HHExpLinearRate" extends="HHRate">
        <Dynamics>
            <DerivedVariable name="x" dimension="none" value="(v - midpoint) / scale" />
            <DerivedVariable name="r" dimension="per_time" exposure="r" value="rate * x / (1 - exp(-x))" />
        </Dynamics>
    </ComponentType>

    <ComponentType name="HHGate0">
        <Parameter name="power" dimension="none" />
        <Child name="Forward" type="HHRate" />
        <Child name="Reverse" type="HHRate" />
        <Requirement name="v" dimension="voltage" />
        <Exposure name="fcond" dimension="none" />
        <Dynamics>
            <StateVariable name="q" dimension="none" />
            <DerivedVariable dimension="per_time" name="rf" select="Forward/r" />
            <DerivedVariable dimension="per_time" name="rr" select="Reverse/r" />
            <TimeDerivative variable="q" value="rf * (1 - q) - rr * q" />
            <DerivedVariable name="fcond" dimension="none" exposure="fcond" value="q^power" />
        </Dynamics>
    </ComponentType>

    <ComponentType name="HHGate">
        <Parameter name="power" dimension="none" />
        <Child name="Forward" type="HHRate" />
        <Child name="Reverse" type="HHRate" />
        <Requirement name="v" dimension="voltage" />
        <Exposure name="fcond" dimension="none" />
        <Dynamics>
            <StateVariable name="x" dimension="none" />
            <DerivedVariable name="ex" dimension="none" value="exp(x)" />
            <DerivedVariable name="q" dimension="none" value="ex / (1 + ex)" />
            <DerivedVariable name="rf" dimension="per_time" select="Forward/r" />
            <DerivedVariable name="rr" dimension="per_time" select="Reverse/r" />
            <TimeDerivative variable="x" value="(1 + ex)^2 / ex * (rf * (1 - q) - rr * q)" />
            <DerivedVariable name="fcond" dimension="none" exposure="fcond" value="q^power" />
        </Dynamics>
    </ComponentType>

    <ComponentType name="HHChannel">
        <Parameter name="conductance" dimension="conductance" />
        <Children name="gates" type="HHGate" />
        <Exposure name="g" dimension="conductance" />
        <Dynamics>
            <DerivedVariable name="gatefeff" dimension="none"
                             select="gates[*]/fcond" reduce="multiply" />
            <DerivedVariable name="g" exposure="g"
                             dimension="conductance" value="conductance * gatefeff" />
        </Dynamics>
    </ComponentType>

    <ComponentType name="ChannelPopulation">
        <ComponentReference name="channel" type="HHChannel" />
        <Parameter name="number" dimension="none" />
        <Parameter name="erev" dimension="voltage" />
        <Requirement name="v" dimension="voltage" />
        <Exposure name="current" dimension="current" />

        <Dynamics>
            <DerivedVariable name="channelg" dimension="conductance" select="channel/g" />
            <DerivedVariable name="geff" dimension="conductance" value="channelg * number" />
            <DerivedVariable name="current" dimension="current" exposure="current" value="geff * (erev - v)" />
        </Dynamics>

        <Structure>
            <ChildInstance component="channel" />
        </Structure>
    </ComponentType>

    <ComponentType name="HHCell">
        <Parameter name="capacitance" dimension="capacitance" />
        <Children name="populations" type="ChannelPopulation" />
        <Parameter name="injection" dimension="current" />
        <Parameter name="v0" dimension="voltage" />
        <Exposure name="v" dimension="voltage" />
        <Dynamics>
            <OnStart>
                <StateAssignment variable="v" value="v0" />
            </OnStart>

            <DerivedVariable name="totcurrent"
                             dimension="current" select="populations[*]/current"
                             reduce="add" />
            <StateVariable name="v" exposure="v"
                           dimension="voltage" />
            <TimeDerivative variable="v"
                            value="(totcurrent + injection) / capacitance" />
        </Dynamics>
    </ComponentType>

    <Component type="HHChannel" id="na" conductance="20pS">
        <Component type="HHGate" id="m" power="3">
            <Component name="Forward" type="HHExpLinearRate" rate="1.per_ms"
                     midpoint="-40mV" scale="10mV" />
            <Component name="Reverse" type="HHExpRate" rate="4per_ms" midpoint="-65mV"
                     scale="-18mV" />
        </Component>
        <Component type="HHGate" id="h" power="1">
            <Component name="Forward" type="HExpRate" rate="0.07per_ms"
                     midpoint="-65.mV" scale="-20.mV" />
            <Component name="Reverse" type="HHSigmoidRate" rate="1per_ms"
                     midpoint="-35mV" scale="10mV" />
        </Component>
    </Component>

    <Component type="HHChannel" id="k" conductance="20pS">
        <HHGate id="n" power="4">
            <Component name="Forward" type="HHExpLinearRate" rate="0.1per_ms"
                     midpoint="-55mV" scale="10mV" />
            <Component name="Reverse" type="HHExpRate" rate="0.125per_ms"
                     midpoint="-65mV" scale="-80mV" />
        </HHGate>
    </Component>

    <Component type="HHCell" id="hhcell_1" capacitance="1pF" injection="4pA" v0="-60mV">
        <Component type="ChannelPopulation" channel="na" number="6000"  erev="50mV" />
        <Component type="ChannelPopulation" channel="k" number="1800" erev="-77mV" />
    </Component>

</Lems>
